// COMSOL Multiphysics 6.1.0.282 model "Q1_P1.mph"
// Outline of the model tree

Parameters
  layer_w = 0.9375[cm]

Geometry
  geom1 "Geometry 1" (2D, length unit m)
    sq1: Square | size = layer_w
    fin: Finalize "Form Union"

Materials
  mat1: Common "Material 1" on all domains
    def "Basic"
      electricconductivity = 0
      relpermeability = 1
      relpermittivity = 2.56

Physics
  emw: ElectromagneticWaves "Electromagnetic Waves, Frequency Domain" on all domains
    dependent variable E = {Ex, Ey, Ez}
    wee1: WaveEquationElectric (default)
    pec1: PerfectElectricConductor (default)
    init1: init "Initial Values 1" (default)
    port1: Port on boundaries 1 | PortType = Periodic; Eampl = {0, 0, 1}
    port2: Port on boundaries 4 | PortType = Periodic; Eampl = {0, 0, 1}
    pc1: PeriodicCondition on boundaries 2, 3
      PeriodicType = Floquet
      Floquet_source = FromPeriodicPort
      destinationDomains: boundaries 3

Mesh
  mesh1 "Mesh 1" (physics-controlled)
    size: MeshSizeDefault | hauto = 8

Studies
  std1 "Study 1"
    frawe: FrequencyAdaptive "Adaptive Frequency Sweep"
      punit = GHz
      plist = range(5[GHz],100[MHz],15[GHz])
      awefunc = abs(comp1.emw.S21)

Solver configurations
  sol1 "Solution 1" (study std1)
    v1: Variables "Dependent Variables 1"
    aw1: AWE "AWE Solver 1" | pname = freq; plist = range(5[GHz],100[MHz],15[GHz]); awefunc = abs(comp1.emw.S21)
      d1: Direct "Suggested Direct Solver (emw)" | linsolver = pardiso

Datasets
  dset1: Solution | solution = sol1

Plots
  pg1: PlotGroup2D "Electric Field (emw)" | data = dset1
    surf1: Surface | expr = emw.normE
  pg2: PlotGroup1D "S-parameter (emw)" | data = dset1; xlabel = Frequency (GHz); ylabel = S-parameter
    glob1: Global
      data = dset1
      expr = {emw.S11, emw.S21, }
      unit = {1, 1, }
      descr = {S11, S21, }
      xdata = expr
      xdataexpr = freq